Simulations
  DataStore
    ExcelInput Observed: FileName=%root%\Tests\Maize\Observations\obsDataMaize_DB.xlsx; SheetNames=[observed]
    ExcelInput LeafSize: SheetNames=[MaxLeafSize]
      FileName=%root%\Tests\Maize\Observations\IndLeafData_MaizeRainshelter.xlsx
    ExcelInput SoilWater: FileName=%root%\Tests\Maize\Observations\SoilWater.xlsx; SheetNames=[SoilWater]
    ExcelInput RSNitrogen: FileName=%root%\Tests\Maize\Observations\obsDataMaize_DB.xlsx; SheetNames=[RainShelterNitrogen]
    PredictedObserved LeafAreas: PredictedTableName=Report; ObservedTableName=MaxLeafSize; FieldNameUsedForMatch=ExtraVariables.Script.LeafExpandedPosition
    PredictedObserved: PredictedTableName=Report; ObservedTableName=observed; FieldNameUsedForMatch=Clock.Today
    TimeSeriesStats: TableName=PredictedObserved
    ExcelInput Phenology: FileName=%root%\Tests\Maize\Observations\obsDataMaize_DB.xlsx; SheetNames=[PhenologySimple_RainS]
    ExcelInput GrainNumber: FileName=%root%\Tests\Maize\Observations\obsDataMaize_DB.xlsx; SheetNames=[GrainsData_RainS]
    ExcelInput RachisHusk: FileName=%root%\Tests\Maize\Observations\obsDataMaize_DB.xlsx; SheetNames=[RachisHusk_RainS]
    ExcelInput FullySenescedLeaves: FileName=%root%\Tests\Maize\Observations\LeafSenesCount.xlsx; SheetNames=[EndSenes]
    ExcelInput StartSenesLeaves: FileName=%root%\Tests\Maize\Observations\LeafSenesCount.xlsx; SheetNames=[StartSenes]
  Experiment Lincoln2012
    Memo Description
      Description of Cultivar trial
    Factors
      Factor Nitrogen: Specifications=[Fert]
        Operations Nil
          2012-11-15  [Fertiliser].Apply(0, Fertiliser.Types.UreaN, 10);
          2012-12-20  [Fertiliser].Apply(0, Fertiliser.Types.UreaN, 10);
          2013-01-31  [Fertiliser].Apply(0, Fertiliser.Types.UreaN, 10);
        Operations Low
          2012-11-15  [Fertiliser].Apply(25, Fertiliser.Types.UreaN, 10);
          2012-12-20  [Fertiliser].Apply(50, Fertiliser.Types.UreaN, 10);
        Operations Med
          2012-11-15  [Fertiliser].Apply(50, Fertiliser.Types.UreaN, 10);
          2012-12-20  [Fertiliser].Apply(100, Fertiliser.Types.UreaN, 10);
          2013-01-31  [Fertiliser].Apply(100, Fertiliser.Types.UreaN, 10);
      Factor Irrigation: Specifications=[Irrig]
        Operations Full
          2012-10-24  [Irrigation].Apply(16);
          2012-10-26  [Irrigation].Apply(10);
          2012-11-03  [Irrigation].Apply(13);
          2012-11-11  [Irrigation].Apply(19.5);
          2012-11-15  [Irrigation].Apply(3.1);
          2012-11-23  [Irrigation].Apply(20);
          2012-11-29  [Irrigation].Apply(20);
          2012-11-30  [Irrigation].Apply(30);
          2012-12-13  [Irrigation].Apply(19);
          2012-12-20  [Irrigation].Apply(26);
          2012-12-20  [Irrigation].Apply(4);
          2012-12-27  [Irrigation].Apply(22);
          2013-01-03  [Irrigation].Apply(39.7);
          2013-01-10  [Irrigation].Apply(42.1);
          2013-01-17  [Irrigation].Apply(46.2);
          2013-01-24  [Irrigation].Apply(44.7);
          2013-01-31  [Irrigation].Apply(49.0);
          2013-02-07  [Irrigation].Apply(37);
          2013-02-14  [Irrigation].Apply(38);
          2013-02-21  [Irrigation].Apply(38);
          2013-02-28  [Irrigation].Apply(33.4);
          2013-03-07  [Irrigation].Apply(39.7);
          2013-03-14  [Irrigation].Apply(31.3);
          2013-03-21  [Irrigation].Apply(24);
          2013-03-28  [Irrigation].Apply(34);
          2013-04-04  [Irrigation].Apply(27.5);
        Operations Nil
          2012-10-24  [Irrigation].Apply(16);
          2012-10-26  [Irrigation].Apply(10);
          2012-11-03  [Irrigation].Apply(13);
          2012-11-11  [Irrigation].Apply(19.5);
          2012-11-15  [Irrigation].Apply(3.1);
          2012-11-23  [Irrigation].Apply(20);
          2012-11-29  [Irrigation].Apply(20);
          2012-12-20  [Irrigation].Apply(4);
          2013-01-31  [Irrigation].Apply(4.3);
    Simulation Lincoln2012: Area=0; Slope=0
      Weather: FileName=%root%\Tests\Maize\lincoln.met
      Clock: StartDate=2012-10-01; EndDate=2013-04-15
      Summary summaryfile
      SoilArbitrator Soil Arbitrator
      Zone RainShelter: Area=1; Slope=0
        Soil paparoa_silt_loam: SoilType=lignin_FOM; Region=Generic soil types; State=Canterbury; Latitude=999999; Longitude=999999
          DataSource=Profile descriptions provided by Trevor Webb and data for functional horizions based on SWAMP project results
          Water
            Thickness  BD     AirDry  LL15  DUL   SAT
            200        1.311  0.06    0.06  0.3   0.37
            200        1.474  0.12    0.12  0.3   0.37
            200        1.601  0.1     0.12  0.26  0.32
            200        1.68   0.13    0.13  0.24  0.3
            200        1.68   0.12    0.12  0.24  0.3
            200        1.68   0.15    0.15  0.21  0.3
            200        1.68   0.15    0.15  0.21  0.3
            200        1.68   0.15    0.15  0.21  0.3
            SoilCrop MaizeSoil: LL=[0.084, 0.12, 0.12, 0.15, 0.15, 0.06, 0.06, 0.06]; KL=[0.15, 0.075, 0.06, 0.06, 0.02, 0.005, 0.002, 0.001]; XF=[1, 1, 1, 1, 1, 1, 1, 1]
          SoilWater: residueinterception=0; SummerDate=1-Nov; SummerU=9; SummerCona=4.4; WinterDate=1-Apr; WinterU=6; WinterCona=3; DiffusConst=88; DiffusSlope=35; Salb=0.13; CN2Bare=73; CNRed=20; CNCov=0.8; max_pond=0; Thickness=[200, 200, 200, 200, 200, 200, 200, 200]; SWCON=[0.5, 0.56, 0.31, 0.7, 0.7, 0.7, 0.7, 0.7]
          SoilNitrogen: fom_type=[default, manure, mucuna, lablab, shemp, stable]; fract_carb=[0.2, 0.3, 0.54, 0.57, 0.45, 0]; fract_cell=[0.7, 0.3, 0.37, 0.37, 0.47, 0.1]; fract_lign=[0.1, 0.4, 0.09, 0.06, 0.08, 0.9]; wfpsN2N2O_x=[22, 88]; wfpsN2N2O_y=[0.1, 1]
          SoilOrganicMatter: RootCN=16; RootWt=6000; SoilCN=11; EnrACoeff=7.4; EnrBCoeff=0.2; OCUnits=Total
            Thickness  OC    FBiom  FInert
            200        1.8   0.03   0.4
            200        0.97  0.02   0.6
            200        0.42  0.01   0.8
            300        0.23  0.01   0.9
            300        0.23  0.01   0.9
            300        0.23  0.01   0.9
          Analysis: Thickness=[200, 200, 200, 300, 300, 300]; PH=[6, 6, 6, 6, 6, 6]; PHUnits=Water; BoronUnits=HotWater
          Sample Initial nitrogen: NO3Units=kgha; NH4Units=kgha; SWUnits=Volumetric; OCUnits=Total; PHUnits=Water
            Thickness  NO3    NH4   SW
            200        16.23  0.9   0.2
            200        10.76  2.92  0.2
            200        7.83   0.57  0.2
            300        6.85   0.98  0.2
            300        4.88   0.84  0.2
            300        1.74   0.54  0.2
        Plant Maize: CropType=Maize
          Cultivar Pioneer_39G12: Command=[Phenology].GrainFilling.Target.Value = 550
          Cultivar Pioneer_3153
          Cultivar Katumani
            Command:
              [Phenology].Juvenile.Target = 150
              [Phenology].Photosensitive.Target.XYPairs.X = 0, 12.5, 24
              [Phenology].Photosensitive.Target.XYPairs.X = 0, 0, 115
              [Phenology].FlagLeafToFlowering.Target = 10
              [Phenology].FloweringToGrainFilling.Target = 120
              [Phenology].GrainFilling.Target = 530
              [Phenology].Maturing.Target = 1
              [Phenology].MaturityToHarvestRipe.Target = 1
              [Rachis].DMDemandFunction.MaximumOrganWt = 14
          OrganArbitrator Arbitrator: NArbitrationOption=RelativeAllocation; DMArbitrationOption=RelativeAllocation
          Phenology: Emerged=false
            MultiplyFunction ThermalTime
              PhaseLookup
                PhaseLookupValue SoilTemperature: Start=Sowing; End=Germination
                  SoilTemperatureFunction ThermalTime: maxt_soil_surface=20; mint_soil_surface=10
                    XYPairs: X=[0, 18, 26, 34, 44]; Y=[0, 10, 18, 26, 44]
                PhaseLookupValue AirTemperature: Start=Germination; End=HarvestRipe
                  AirTemperatureFunction ThermalTime
                    XYPairs: X=[0, 18, 26, 34, 44]; Y=[0, 10, 18, 26, 44]
              AddFunction DroughtPhenologyAcelleration
                Constant One: Value=1
                MultiplyFunction Stress
                  Constant StressResponseCoefficient: Value=2
                  LinearInterpolationFunction StressFactor: XProperty=[Maize].WaterSupplyDemandRatio
                    XYPairs: X=[0, 1]; Y=[0, 0]
            GerminatingPhase Germinating: Start=Sowing; End=Germination
            EmergingPhase Emerging: Start=Germination; End=Emergence; ShootLag=55; ShootRate=0.6
              VariableReference ThermalTime: VariableName=[Phenology].ThermalTime.Value
            GenericPhase Juvenile: Start=Emergence; End=End_Juvenile
              Constant Target: Value=200
              VariableReference ThermalTime: VariableName=[Phenology].ThermalTime.Value
            GenericPhase Photosensitive: Start=End_Juvenile; End=Floral_Initiation
              VariableReference ThermalTime: VariableName=[Phenology].ThermalTime.Value
              LinearInterpolationFunction Target: XProperty=[Phenology].Photoperiod.Value
                XYPairs: X=[0, 12.5, 24]; Y=[0, 0, 10]
            LeafAppearancePhase LeafAppearance: Start=Floral_Initiation; End=Flag_Leaf
              VariableReference ThermalTime: VariableName=[Phenology].ThermalTime.Value
            GenericPhase FlagLeafToFlowering: Start=Flag_Leaf; End=Flowering
              Constant Target: Value=50
              VariableReference ThermalTime: VariableName=[Phenology].ThermalTime.Value
            GenericPhase FloweringToGrainFilling: Start=Flowering; End=StartGrainFill
              Constant Target: Value=120
              VariableReference ThermalTime: VariableName=[Phenology].ThermalTime.Value
            GenericPhase GrainFilling: Start=StartGrainFill; End=EndGrainFill
              Constant Target: Value=900
              VariableReference ThermalTime: VariableName=[Phenology].ThermalTime.Value
            GenericPhase Maturing: Start=EndGrainFill; End=Maturity
              Constant Target: Value=10
              VariableReference ThermalTime: VariableName=[Phenology].ThermalTime.Value
            GenericPhase MaturityToHarvestRipe: Start=Maturity; End=HarvestRipe
              Constant Target: Value=10
              VariableReference ThermalTime: VariableName=[Phenology].ThermalTime.Value
            EndPhase ReadyForHarvesting: Start=HarvestRipe; End=Unused
              VariableReference ThermalTime: VariableName=[Phenology].ThermalTime.Value
            PhotoperiodFunction Photoperiod: Twilight=-6
          Structure: InitialiseStage=Emergence; PrimaryBudNo=1
            VariableReference ThermalTime: VariableName=[Phenology].ThermalTime.Value
            PhaseLookup MainStemPrimordiaInitiationRate
              PhaseLookupValue Plastochron: Start=Emergence; End=Floral_Initiation
                MultiplyFunction PlastCalc
                  VariableReference Phyllochron: VariableName=[Structure].MainStemNodeAppearanceRate.Value
                  Constant TipPerPrimordia: Value=0.5
            PhaseLookup MainStemNodeAppearanceRate
              PhaseLookupValue Phyllochron: Start=Emergence; End=Flag_Leaf
                LinearInterpolationFunction Phyllochron: XProperty=[Structure].MainStemNodeNo
                  XYPairs: X=[1, 3.4, 4]; Y=[30, 30, 42]
            MainStemFinalNodeNumberFunction MainStemFinalNodeNumber: MaximumMainStemNodeNumber=30
              OnEventFunction FinalLeafNumber: SetEvent=Floral_Initiation
                AddFunction PreEventValue
                  Constant PrimordiaAtEmergence: Value=6
                  DivideFunction
                    VariableReference JuvenilePhaseDuration: VariableName=[Phenology].Juvenile.Target.Value
                    Constant ApproximatePlastochron: Value=15
                VariableReference PostEventValue: VariableName=[Structure].MainStemPrimordiaNo
            HeightFunction HeightModel
              LinearInterpolationFunction PotentialHeight: XProperty=[Phenology].Stage
                XYPairs: X=[3, 4, 5, 6]; Y=[20, 50, 60, 1700]
              LinearInterpolationFunction WaterStress: XProperty=[Maize].WaterSupplyDemandRatio
                XYPairs: X=[0.3, 1]; Y=[1, 1]
            MultiplyFunction BranchingRate
              LinearInterpolationFunction PotentialBranchingRate: XProperty=[Leaf].AppearedCohortNo
                XYPairs: X=[3, 4, 5, 6]; Y=[0, 0, 0, 0]
              LinearInterpolationFunction WaterStress: XProperty=[Maize].WaterSupplyDemandRatio
                XYPairs: X=[0.3, 1]; Y=[1, 1]
            PhaseLookup ShadeInducedBranchMortality
              PhaseLookupValue: Start=Emergence; End=StartGrainFill
                LinearInterpolationFunction ShadeInducedBranchMortality: XProperty=[Leaf].CoverGreen
                  XYPairs: X=[0, 0.98, 0.99, 1]; Y=[0, 0, 0, 0]
            PhaseLookup DroughtInducedBranchMortality
              PhaseLookupValue: Start=Emergence; End=EndGrainFill
                LinearInterpolationFunction WaterStress: XProperty=[Maize].WaterSupplyDemandRatio
                  XYPairs: X=[0.1, 0.6]; Y=[0, 0]
          ReproductiveOrgan Grain
            Constant InitialGrainProportion: Value=0.05
            Constant MaximumPotentialGrainSize: Value=0.3
            PhaseLookup DMDemandFunction
              PhaseLookupValue InitialPhase: Start=Flowering; End=StartGrainFill
                FillingRateFunction
                  VariableReference NumberFunction: VariableName=[Grain].NumberFunction.Value
                  VariableReference FillingDuration: VariableName=[Phenology].FloweringToGrainFilling.Target.Value
                  VariableReference ThermalTime: VariableName=[Phenology].ThermalTime.Value
                  MultiplyFunction PotentialSizeIncrement
                    VariableReference InitialProportion: VariableName=[Grain].InitialGrainProportion.Value
                    VariableReference MaximumSize: VariableName=[Grain].MaximumPotentialGrainSize.Value
              PhaseLookupValue LinearPhase: Start=StartGrainFill; End=EndGrainFill
                FillingRateFunction
                  VariableReference NumberFunction: VariableName=[Grain].NumberFunction.Value
                  VariableReference FillingDuration: VariableName=[Phenology].GrainFilling.Target.Value
                  VariableReference ThermalTime: VariableName=[Phenology].ThermalTime.Value
                  MultiplyFunction PotentialSizeIncrement
                    SubtractFunction ProportionLinearPhase
                      Constant One: Value=1
                      VariableReference InitialProportion: VariableName=[Grain].InitialGrainProportion.Value
                    VariableReference MaximumSize: VariableName=[Grain].MaximumPotentialGrainSize.Value
            Biomass Live
            Biomass Dead
            Constant MinimumNConc: Value=0.008
            PhaseLookup MaximumNConc
              PhaseLookupValue InitialPhase: Start=Flowering; End=StartGrainFill
                Constant InitialNconc: Value=0.05
              PhaseLookupValue LinearPhase: Start=StartGrainFill; End=EndGrainFill
                Constant FinalNconc: Value=0.012
            Constant WaterContent: Value=0.12
            PhaseLookup NFillingRate
              PhaseLookupValue GrainFilling: Start=Flowering; End=EndGrainFill
                FillingRateFunction
                  VariableReference NumberFunction: VariableName=[Grain].NumberFunction.Value
                  AddFunction FillingDuration
                    VariableReference FloweringToGrainFilling: VariableName=[Phenology].FloweringToGrainFilling.Target.Value
                    VariableReference GrainFilling: VariableName=[Phenology].GrainFilling.Target.Value
                  VariableReference ThermalTime: VariableName=[Phenology].ThermalTime.Value
                  MultiplyFunction PotentialSizeIncrement
                    Constant MaximumFinalNConc: Value=0.013
                    VariableReference MaximumSize: VariableName=[Grain].MaximumPotentialGrainSize.Value
            MultiplyFunction NumberFunction
              VariableReference CobNumber: VariableName=[Rachis].CobNumber.Value
              LinearInterpolationFunction KernalsPerCob: XProperty=[Rachis].CobSize.Value
                XYPairs: X=[0, 25]; Y=[0, 550]
              Constant GrainPerKernal: Value=1
          Root: InitialDM=0.2; SpecificRootLength=40000; KNO3=0.03; KNH4=0; NuptakeSupply=0
            CompositeBiomass Live: Propertys=[[Root].LayerLive]
            CompositeBiomass Dead: Propertys=[[Root].LayerDead]
            LinearInterpolationFunction KLModifier: XProperty=[Leaf].LAI
              XYPairs: X=[0, 3]; Y=[1, 1]
            Constant SoilWaterEffect: Value=1
            AirTemperatureFunction TemperatureEffect
              XYPairs: X=[0, 26, 35]; Y=[1, 1, 1]
            Constant MaxDailyNUptake: Value=20
            Constant SenescenceRate: Value=0
            Constant StructuralFraction: Value=1
            Constant MaximumNConc: Value=0.01
            Constant MinimumNConc: Value=0.01
            LinearInterpolationFunction PartitionFraction: XProperty=[Phenology].Stage
              XYPairs: X=[0, 2.99, 3, 4, 5]; Y=[0, 0, 0.2, 0.2, 0]
            PhaseLookup RootFrontVelocity
              PhaseLookupValue PreEmergence: Start=Germination; End=Emergence
                Constant Function: Value=5
              PhaseLookupValue PostEmergence: Start=Emergence; End=Maturity
                Constant Function: Value=30
            PhaseBasedSwitch NitrogenDemandSwitch: Start=Germination; End=Maturity
          Leaf: CurrentExpandingLeaf=0; StartFractionExpanded=0; FractionNextleafExpanded=0; _ExpandedNodeNo=0; DeadNodesYesterday=0; MaxCover=1; PotentialEP=0; KDead=0.03; GsMax=0.03; R50=200; Emissivity=0.96; Albido=0.26; FractionDied=0
            LeafCohort InitialLeaves[1]: Rank=1; Area=380
            LeafCohort InitialLeaves[2]: Rank=2; Area=0
            LeafCohort InitialLeaves[3]: Rank=3; Area=0
            LeafCohort InitialLeaves[4]: Rank=4; Area=0
            LeafCohort InitialLeaves[5]: Rank=5; Area=0
            LeafCohort InitialLeaves[6]: Rank=6; Area=0
            CompositeBiomass Live: Propertys=[[Leaf].CohortLive]
            CompositeBiomass Dead: Propertys=[[Leaf].CohortDead]
            ArrayBiomass CohortArrayLive: Propertys=[[Leaf].Live]; ArraySize=[Leaf].MaxNodeNo
            ArrayBiomass CohortArrayDead: Propertys=[[Leaf].Dead]; ArraySize=[Leaf].MaxNodeNo
            InitialLeafValues
              BellCurveFunction MaxArea
                MultiplyFunction LargestLeafPosition
                  VariableReference FinalLeafNumber: VariableName=[Structure].MainStemFinalNodeNumber.Value
                  Constant RelativePositionOfLargestLeaf: Value=0.67
                LinearInterpolationFunction AreaMax: XProperty=[Structure].MainStemFinalNodeNumber.Value
                  XYPairs: X=[1, 5, 10, 15, 20, 25]; Y=[32530, 39259, 49659, 60000, 75000, 90000]
                LinearInterpolationFunction Breadth: XProperty=[Structure].MainStemFinalNodeNumber.Value
                  XYPairs: X=[5, 10, 15, 20, 25]; Y=[-0.377, -0.144, -0.059, -0.027, -0.016]
                Constant Skewness: Value=0.00025
              Constant NReallocationFactor: Value=0.1
              Constant NRetranslocationFactor: Value=0.1
              Constant DMRetranslocationFactor: Value=0.5
              LinearInterpolationFunction CellDivisionStress: XProperty=[Maize].WaterSupplyDemandRatio
                XYPairs: X=[0.9, 1]; Y=[1, 1]
              LinearInterpolationFunction ExpansionStress: XProperty=[Maize].WaterSupplyDemandRatio
                XYPairs: X=[0.3, 1]; Y=[0.1, 1]
              LinearInterpolationFunction GrowthDuration: XProperty=[Structure].RelativeNodeApperance
                XYPairs: X=[0, 0.3, 0.5, 1]; Y=[0, 200, 250, 100]
              LinearInterpolationFunction LagDuration: XProperty=[Structure].RelativeNodeApperance
                XYPairs: X=[0, 0.5, 1]; Y=[350, 650, 600]
              LinearInterpolationFunction SenescenceDuration: XProperty=[Structure].RelativeNodeApperance
                XYPairs: X=[0, 11, 20]; Y=[359, 350, 350]
              Constant DetachmentLagDuration: Value=1000000
              Constant DetachmentDuration: Value=1000000
              LinearInterpolationFunction MaximumNConc: XProperty=[Structure].MainStemNodeNo
                XYPairs: X=[1, 6]; Y=[0.06, 0.03]
              Constant CriticalNConc: Value=0.018
              Constant MinimumNConc: Value=0.008
              AddFunction DroughtInducedSenAcceleration
                Constant One: Value=1
                MultiplyFunction Stress
                  Constant StressResponseCoefficient: Value=1
                  LinearInterpolationFunction StressFactor: XProperty=[Maize].WaterSupplyDemandRatio
                    XYPairs: X=[0, 0.7]; Y=[0, 0]
              LinearInterpolationFunction SpecificLeafAreaMax: XProperty=[Structure].MainStemNodeNo
                XYPairs: X=[1, 9]; Y=[60000, 30000]
              LinearInterpolationFunction SpecificLeafAreaMin: XProperty=[Structure].MainStemNodeNo
                XYPairs: X=[1, 9]; Y=[6000, 6000]
              Constant StructuralFraction: Value=0.7
              Constant NonStructuralFraction: Value=0
              LinearInterpolationFunction ShadeInducedSenescenceRate: XProperty=[Leaf].CohortCurrentRankCoverAbove
                XYPairs: X=[0, 0.7, 0.8, 0.96, 0.99]; Y=[0, 0, 0, 0, 0]
              Constant InitialNConc: Value=0
            RUEModel Photosynthesis
              Constant RUE: Value=1.75
              WeightedTemperatureFunction FT: MaximumTemperatureWeighting=0.75
                XYPairs: X=[0, 8, 15, 35, 50]; Y=[0, 0, 1, 1, 0]
              LinearInterpolationFunction FVPD: XProperty=[Leaf].Photosynthesis.VPD
                XYPairs: X=[0, 10, 50]; Y=[1, 1, 1]
              LinearInterpolationFunction FN: XProperty=[Leaf].Fn
                XYPairs: X=[0, 1, 1.5]; Y=[0, 1, 1]
              LinearInterpolationFunction FW: XProperty=[Leaf].Fw
                XYPairs: X=[0, 0.3]; Y=[0, 1]
              RUECO2Function FCO2: PhotosyntheticPathway=C4
            MultiplyFunction ExtinctionCoeff
              LinearInterpolationFunction PotentialExtinctionCoeff: XProperty=[Leaf].LAI
                XYPairs: X=[0, 0.45]; Y=[0.65, 0.65]
              LinearInterpolationFunction WaterStress: XProperty=[Maize].WaterSupplyDemandRatio
                XYPairs: X=[0, 0.7]; Y=[0.5, 1]
            LinearInterpolationFunction FrostFraction: XProperty=[Weather].MinT
              XYPairs: X=[-10, -9]; Y=[1, 0]
            VariableReference ThermalTime: VariableName=[Phenology].ThermalTime.Value
          GenericAboveGroundOrgan Husk
            PopulationBasedDemandFunction DMDemandFunction: StartStage=5.2; GrowthDuration=120; MaximumOrganWt=25
              VariableReference ThermalTime: VariableName=[Phenology].ThermalTime.Value
              Constant ExpansionStress: Value=1
            Biomass Live
            Biomass Dead
            Constant NReallocationFactor: Value=0
            Constant NRetranslocationFactor: Value=0.1
            Constant MaximumNConc: Value=0.01
            Constant StructuralFraction: Value=0.2
            Constant MinimumNConc: Value=0.01
          GenericAboveGroundOrgan Rachis
            MultiplyFunction CobNumber
              VariableReference StemNumber: VariableName=[Structure].TotalStemPopn
              Constant CobsPerStem: Value=1.1
            DivideFunction CobSize
              VariableReference CobMass: VariableName=[Rachis].Live.Wt
              VariableReference CobMass: VariableName=[Rachis].CobNumber.Value
            PopulationBasedDemandFunction DMDemandFunction: StartStage=5.5; GrowthDuration=300; MaximumOrganWt=25
              VariableReference ThermalTime: VariableName=[Phenology].ThermalTime.Value
              Constant ExpansionStress: Value=1
            Biomass Live
            Biomass Dead
            Constant NReallocationFactor: Value=0
            Constant NRetranslocationFactor: Value=0.1
            Constant MaximumNConc: Value=0.008
            Constant StructuralFraction: Value=1
            Constant MinimumNConc: Value=0.003
            LinearInterpolationFunction ExpansionStress: XProperty=[Maize].WaterSupplyDemandRatio
              XYPairs: X=[0, 0.6]; Y=[1, 1]
          GenericAboveGroundOrgan Tastle
            PopulationBasedDemandFunction DMDemandFunction: StartStage=5; GrowthDuration=300; MaximumOrganWt=0
              VariableReference ThermalTime: VariableName=[Phenology].ThermalTime.Value
              Constant ExpansionStress: Value=1
            Biomass Live
            Biomass Dead
            Constant NReallocationFactor: Value=0
            Constant NRetranslocationFactor: Value=0.1
            Constant MaximumNConc: Value=0.01
            Constant StructuralFraction: Value=1
            Constant MinimumNConc: Value=0.01
            LinearInterpolationFunction ExpansionStress: XProperty=[Maize].WaterSupplyDemandRatio
              XYPairs: X=[0, 0.6]; Y=[1, 1]
          GenericAboveGroundOrgan Stem
            Biomass Live
            Biomass Dead
            Constant StructuralFraction: Value=0.8
            LinearInterpolationFunction MaximumNConc: XProperty=[Phenology].Stage
              XYPairs: X=[3, 5, 5.5]; Y=[0.04, 0.04, 0.005]
            Constant MinimumNConc: Value=0.006
            PhaseBasedSwitch NitrogenDemandSwitch: Start=Emergence; End=StartGrainFill
            Constant NReallocationFactor: Value=0
            Constant NRetranslocationFactor: Value=0.5
            Constant DMRetranslocationFactor: Value=0.5
            MinimumFunction DMDemandFunction
              MultiplyFunction PotentialDMAccumulation
                VariableReference NodesAppearing: VariableName=[Structure].DeltaNodeNumber
                VariableReference Branches: VariableName=[Structure].TotalStemPopn
                LinearInterpolationFunction PotentialInternodeWt: XProperty=[Structure].RelativeNodeApperance
                  XYPairs: X=[0, 0.5, 1]; Y=[0, 0.2, 16]
              MultiplyFunction HightLimitedDMAccumulation
                Constant SpecificStemLengthMax: Value=500
                VariableReference Branches: VariableName=[Structure].TotalStemPopn
                VariableReference DeltaHeight: VariableName=[Structure].HeightModel.DeltaHeight
          Summariser
            CompositeBiomass AboveGround
              Propertys=[[Leaf].Live, [Leaf].Dead, [Stem].Live, [Stem].Dead, [Husk].Live, [Husk].Dead, [Grain].Live, [Grain].Dead, [Rachis].Live, [Rachis].Dead, [Tastle].Live, [Tastle].Dead]
            CompositeBiomass BelowGround: Propertys=[[Root].Live, [Root].Dead]
            CompositeBiomass Total
              Propertys=[[Leaf].Live, [Leaf].Dead, [Stem].Live, [Stem].Dead, [Husk].Live, [Husk].Dead, [Grain].Live, [Grain].Dead, [Rachis].Live, [Rachis].Dead, [Tastle].Live, [Tastle].Dead, [Root].Live, [Root].Dead]
            CompositeBiomass TotalLive
              Propertys=[[Leaf].Live, [Stem].Live, [Husk].Live, [Grain].Live, [Rachis].Live, [Tastle].Live, [Root].Live]
            CompositeBiomass TotalDead
              Propertys=[[Leaf].Dead, [Stem].Dead, [Husk].Dead, [Grain].Dead, [Rachis].Dead, [Tastle].Dead, [Root].Dead]
            CompositeBiomass EarLive: Propertys=[[Husk].Live, [Grain].Live, [Rachis].Live]
            CompositeBiomass StemLive: Propertys=[[Stem].Live, [Tastle].Live]
            CompositeBiomass AboveGroundLive
              Propertys=[[Leaf].Live, [Stem].Live, [Husk].Live, [Grain].Live, [Rachis].Live, [Tastle].Live]
            CompositeBiomass AboveGroundDead
              Propertys=[[Leaf].Dead, [Stem].Dead, [Husk].Dead, [Grain].Dead, [Rachis].Dead, [Tastle].Dead]
        MicroClimate: air_pressure=1010; soil_emissivity=0.96; sun_angle=15; soil_heat_flux_fraction=0.4; night_interception_fraction=0.5; windspeed_default=3; refheight=2; albedo=0.15; emissivity=0.96; gsmax=0.01; r50=200; a_interception=0; b_interception=1; c_interception=0; d_interception=0; soil_albedo=0.23
        Irrigation
        Fertiliser
        SurfaceOrganicMatter: PoolName=wheat; type=wheat; mass=0; standing_fraction=0; cnr=80; CriticalResidueWeight=2000; OptimumDecompTemp=20; MaxCumulativeEOS=20; CNRatioDecompCoeff=0.277; CNRatioDecompThreshold=25; TotalLeachRain=25; MinRainToLeach=10; CriticalMinimumOrganicC=0.004; DefaultCPRatio=0; DefaultStandingFraction=0; StandingExtinctCoeff=0.5; FractionFaecesAdded=0.5
          Pools:
            {PoolName=wheat, ResidueType=wheat, Mass=0, CNRatio=80, StandingFraction=0}
          ResidueTypes ResidueTypesList: LoadFromResource=ResidueTypes
        Operations Irrig
          2012-10-24  [Irrigation].Apply(16);
          2012-10-26  [Irrigation].Apply(10);
          2012-11-03  [Irrigation].Apply(13);
          2012-11-11  [Irrigation].Apply(19.5);
          2012-11-15  [Irrigation].Apply(3.1);
          2012-11-23  [Irrigation].Apply(20);
          2012-11-29  [Irrigation].Apply(20);
          2012-11-30  [Irrigation].Apply(30);
          2012-12-13  [Irrigation].Apply(19);
          2012-12-20  [Irrigation].Apply(26);
          2012-12-20  [Irrigation].Apply(4);
          2012-12-27  [Irrigation].Apply(22);
          2013-01-03  [Irrigation].Apply(39.7);
          2013-01-10  [Irrigation].Apply(42.1);
          2013-01-17  [Irrigation].Apply(46.2);
          2013-01-24  [Irrigation].Apply(44.7);
          2013-01-31  [Irrigation].Apply(44.7);
          2013-01-31  [Irrigation].Apply(4.3);
          2013-02-07  [Irrigation].Apply(37);
          2013-02-14  [Irrigation].Apply(38);
          2013-02-21  [Irrigation].Apply(38);
          2013-02-28  [Irrigation].Apply(33.4);
          2013-03-07  [Irrigation].Apply(39.7);
          2013-03-14  [Irrigation].Apply(31.3);
          2013-03-21  [Irrigation].Apply(24);
          2013-03-28  [Irrigation].Apply(34);
          2013-04-04  [Irrigation].Apply(27.5);
        Operations Fert
          2012-11-15  [Fertiliser].Apply(50, Fertiliser.Types.UreaN, 10);
          2012-12-20  [Fertiliser].Apply(100, Fertiliser.Types.UreaN, 10);
          2013-01-31  [Fertiliser].Apply(100, Fertiliser.Types.UreaN, 10);
        Operations Sow
          2012-10-23  [Maize].Sow(population:11, cultivar:"Pioneer_39G12", depth:50, rowSpacing:710);
        Manager ExtraVariables
```csharp
using System;
using Models.Core;
using System.Collections.Generic;
using System.Text;
using Models.Soils;
using Models.PMF;
using Models;
using System.Xml.Serialization;
using APSIM.Shared.Utilities;

namespace Models
{
	[Serializable] 
	public class Script : Model
	{      
		[Link] Clock Clock;
		[Link] Soils.Soil Soil;
		[Link] Models.SurfaceOM.SurfaceOrganicMatter SOM;
		[Link] Weather Met;   
		[Link] Fertiliser Fert;
		[Link] Irrigation Irrig;  
		[Link] Plant Maize;          
		[Link] Zone zone;			
					
		[XmlIgnore] public bool InitialDay { get; set; }
		
		[XmlIgnore] public double AccumPlantN { get; set; }
		[XmlIgnore] public double AccumMineralisation { get; set; }
		[XmlIgnore] public double AccumDenit { get; set; }
		[XmlIgnore] public double AccumFert { get; set; }
		[XmlIgnore] public double AccumLeach { get; set; }
		[XmlIgnore] public double AccumDetach { get; set; }
		[XmlIgnore] public double DeltaSoilOMN { get; set; }
		[XmlIgnore] public double DeltaSurfaceOMN { get; set; }
		[XmlIgnore] public double DeltaSoilMineralN { get; set; }
		[XmlIgnore] public double SoilNitrogenContent { get; set; }
		
		[XmlIgnore] public double AccumEO { get; set; }
		[XmlIgnore] public double AccumEP { get; set; }
		[XmlIgnore] public double AccumES { get; set; }
		[XmlIgnore] public double AccumDrainage { get; set; }
		[XmlIgnore] public double AccumRunoff { get; set; }
		[XmlIgnore] public double AccumOutflowLat { get; set; }
		[XmlIgnore] public double AccumIrrigation { get; set; }
		[XmlIgnore] public double AccumRainfall { get; set; }
		[XmlIgnore] public double SoilWaterDeficit { get; set; }
	
		[XmlIgnore] public double  InitialSoilOMN { get; set; }
		[XmlIgnore] public double  InitialSurfaceOMN { get; set; }
		[XmlIgnore] public double  InitialMineralN { get; set; }
		
		[XmlIgnore] public double SWC { get; set; }
		[XmlIgnore] public double DUL { get; set; }
		[XmlIgnore] public double OutFlowLat { get; set; }

		[XmlIgnore] public double FomN { get; set; }
		[XmlIgnore] public double BiomN { get; set; }
		[XmlIgnore] public double HumN { get; set; }
		[XmlIgnore] public double OrganicN { get; set; }
		[XmlIgnore] public double NO3N { get; set; }
		[XmlIgnore] public double NH4N { get; set; }
		[XmlIgnore] public double UreaN { get; set; }
		[XmlIgnore] public double MineralN { get; set; }
		[XmlIgnore] public double DltNMinRes { get; set; }
		[XmlIgnore] public double DltNMinTot { get; set; }
		
		[XmlIgnore] public double LeafExpandedPosition {get; set;}
        [XmlIgnore] public double LeafAppearedPosition {get; set;}
        [XmlIgnore] public double ExpandedLeafNoYesterday {get; set;}
        [XmlIgnore] public double AppearedLeafNoYesterday {get; set;}
        [XmlIgnore] public double MostRecentlyExpandedLeafSize {get; set;}
        [XmlIgnore] public double MostRecentlyAppearedLeafMaxSize {get; set;}
        
        [EventSubscribe("Commencing")]
        private void OnSimulationCommencing(object sender, EventArgs e)
        {
			InitialDay = true;
			LeafExpandedPosition = 0;
			LeafAppearedPosition = 0;
			ExpandedLeafNoYesterday = 0;
			AppearedLeafNoYesterday = 0;
			MostRecentlyExpandedLeafSize = 0;
			MostRecentlyAppearedLeafMaxSize = 0;
		}	   
		
		[EventSubscribe("DoManagement")]
		private void OnDoManagement(object sender, EventArgs e)
		{
			//!!!!!! Nitrogen balance components !!!!!!
			//!!!!!!^^^^^^^^^^^^^^^^^^^^^^^^^^^^^!!!!!!
           	FomN = MathUtilities.Sum(Soil.SoilNitrogen.FOMN);
			HumN = MathUtilities.Sum(Soil.SoilNitrogen.HumicN);
		    BiomN = MathUtilities.Sum(Soil.SoilNitrogen.MicrobialN);
			OrganicN = FomN + HumN + BiomN;
			NO3N = MathUtilities.Sum(Soil.NO3N);
			NH4N = MathUtilities.Sum(Soil.NH4N);
			UreaN = MathUtilities.Sum(Soil.SoilNitrogen.urea);
			MineralN = NO3N + NH4N + UreaN; 
			DltNMinRes = MathUtilities.Sum(Soil.SoilNitrogen.dlt_n_min_res);
			DltNMinTot = MathUtilities.Sum(Soil.SoilNitrogen.MineralisedN);
            int layers = Soil.Thickness.Length;
			if (InitialDay == true)
			{
				InitialSurfaceOMN = SOM.N;
				InitialSoilOMN = OrganicN;
				InitialMineralN = MineralN;
				InitialDay = false;
			}
			AccumFert += Fert.NitrogenApplied;
			DeltaSurfaceOMN = SOM.N - InitialSurfaceOMN;
			AccumLeach = AccumLeach - Soil.SoilWater.LeachNH4 - Soil.SoilWater.LeachNO3 - Soil.SoilWater.LeachUrea; //Fails
            AccumMineralisation += MathUtilities.Sum(Soil.SoilNitrogen.MineralisedN);
            AccumDenit -= MathUtilities.Sum(Soil.SoilNitrogen.Denitrification);
			AccumPlantN -= (double)zone.Get("Maize.Root.NUptake");
			DeltaSoilOMN = OrganicN - InitialSoilOMN;
			DeltaSoilMineralN = MineralN - InitialMineralN;
			SoilNitrogenContent = MineralN;
			
			//!!!!!! Water balance components !!!!!!
			//!!!!!!^^^^^^^^^^^^^^^^^^^^^^^^^^!!!!!!

			AccumIrrigation += Irrig.IrrigationApplied;
			AccumRainfall += Met.Rain;
			//AccumEP -= (double)zone.Get("[Maize].Leaf.Transpiration");
            AccumEP -= (double)zone.Get("Maize.Root.WaterUptake");
			SoilWaterDeficit =  (SWC - DUL);
			double OutFlowLat = MathUtilities.Sum(Soil.SoilWater.outflow_lat);
			AccumOutflowLat -= OutFlowLat;
			
			//Leaf number variable
			ExpandedLeafNoYesterday = (double)zone.Get("Maize.Leaf.ExpandedCohortNo");
			AppearedLeafNoYesterday = (double)zone.Get("Maize.Leaf.AppearedCohortNo");
		}
		
		[EventSubscribe("DoManagementCalculations")]
		private void OnDoManagementCalculations(object sender, EventArgs e)
		{
			FomN = MathUtilities.Sum(Soil.SoilNitrogen.FOMN);
			HumN = MathUtilities.Sum(Soil.SoilNitrogen.HumicN);
		    BiomN = MathUtilities.Sum(Soil.SoilNitrogen.MicrobialN);
			
			
			AccumEO -= Soil.SoilWater.Eo;
			AccumES -= Soil.SoilWater.Es; 
			AccumDrainage -= Soil.SoilWater.Drainage;
			AccumRunoff -= Soil.SoilWater.Runoff;
			SWC = MathUtilities.Sum(Soil.SoilWater.SWmm);
			DUL = MathUtilities.Sum(Soil.SoilWater.DULmm);
			
			if ((double)zone.Get("Maize.Leaf.ExpandedCohortNo") > ExpandedLeafNoYesterday)
			{
			LeafExpandedPosition = (double)zone.Get("Maize.Leaf.ExpandedCohortNo");
			MostRecentlyExpandedLeafSize = (double)zone.Get("Maize.Leaf.CohortSize["+(int)LeafExpandedPosition+"]");
			}
			else
			LeafExpandedPosition = 0;
			
			if ((double)zone.Get("Maize.Leaf.AppearedCohortNo") > AppearedLeafNoYesterday) 
			{
			LeafAppearedPosition = (double)zone.Get("Maize.Leaf.AppearedCohortNo");
			MostRecentlyAppearedLeafMaxSize = (double)zone.Get("Maize.Leaf.InitialLeafValues.MaxArea.Value");
			}
			//else
			//LeafAppearedPosition = 0;
			
		}
	}
}
```
        Report: EventNames=[Clock].DoReport
          VariableNames:
            [Clock].Today
            [ExtraVariables].Script.AccumPlantN
            [ExtraVariables].Script.AccumMineralisation
            [ExtraVariables].Script.AccumDenit
            [ExtraVariables].Script.AccumFert
            [ExtraVariables].Script.AccumLeach
            [ExtraVariables].Script.AccumDetach
            [ExtraVariables].Script.DeltaSoilOMN
            [ExtraVariables].Script.DeltaSurfaceOMN
            [ExtraVariables].Script.DeltaSoilMineralN
            [ExtraVariables].Script.SWC
            [ExtraVariables].Script.DUL
            [ExtraVariables].Script.OutFlowLat
            [ExtraVariables].Script.AccumEO
            [ExtraVariables].Script.AccumEP
            [ExtraVariables].Script.AccumES
            [ExtraVariables].Script.AccumDrainage
            [ExtraVariables].Script.AccumRunoff
            [ExtraVariables].Script.AccumRainfall
            [ExtraVariables].Script.AccumIrrigation
            [ExtraVariables].Script.AccumOutflowLat
            [ExtraVariables].Script.SoilWaterDeficit
            [ExtraVariables].Script.SoilNitrogenContent
            [ExtraVariables].Script.FomN
            [ExtraVariables].Script.HumN
            [ExtraVariables].Script.BiomN
            [ExtraVariables].Script.DltNMinRes
            [ExtraVariables].Script.DltNMinTot
            [Soil].SoilWater.SW
            [Soil].SoilWater.Eo
            [Soil].SoilWater.Es
            [Soil].SoilWater.Drainage
            [Soil].SoilWater.Runoff
            [Soil].SoilWater.pond
            sum([Soil].SoilWater.SWmm) as ProfileWater
            [Soil].NO3N
            [MicroClimate].net_radn
            [MicroClimate].peta
            [MicroClimate].petr
            [Maize].Grain.Live.Wt
            [Maize].Stem.Live.Wt
            [Maize].Summariser.EarLive.Wt
            [Maize].Leaf.Live.Wt
            [Maize].Root.Live.Wt
            [Maize].Husk.Live.Wt
            [Maize].Rachis.Live.Wt
            [Maize].Tastle.Live.Wt
            [Maize].Summariser.EarLive.N
            [Maize].Grain.Live.N
            [Maize].Stem.Live.N
            [Maize].Leaf.Live.N
            [Maize].Root.Live.N
            [Maize].Rachis.Live.N
            [Maize].Husk.Live.N
            [Maize].Root.WaterSupply
            [Maize].Root.WaterUptake
            [Maize].Leaf.Transpiration
            [Maize].Leaf.WaterDemand
            [Maize].Root.Depth
            [Maize].Leaf.CoverTotal
            [Maize].Leaf.CoverDead
            [Maize].Leaf.LAI
            [Maize].Leaf.Height
            [Maize].Leaf.InitialLeafValues.MaxArea.Value
            [Maize].Leaf.Fw
            [Maize].Leaf.Photosynthesis.FVPD.Value
            [Maize].Leaf.Photosynthesis.FT.Value
            [Maize].Leaf.Fn
            [Maize].Phenology.CurrentPhaseName
            [Maize].Phenology.Stage
            [Maize].Summariser.AboveGroundLive.N
            [Maize].Summariser.AboveGroundLive.Wt
            [Maize].Summariser.Total.N
            [Maize].Summariser.Total.Wt
            [Maize].Arbitrator.NDemand
            [Maize].Phenology.Stage
            [Maize].Leaf.ExpandedCohortNo
            [Maize].Leaf.AppearedCohortNo
            [Maize].Leaf.DeadCohortNo
            [Maize].Leaf.InitialisedCohortNo
            [Maize].Structure.MainStemFinalNodeNo
            [Maize].Structure.MainStemNodeNo
            [Maize].Structure.MainStemPrimordiaNo
            [Maize].Leaf.CohortArea[1:30]
            [Maize].Leaf.CohortSLA[1:30]
            [Maize].Leaf.InitialLeafValues.SpecificLeafAreaMax.Value
            [Maize].Leaf.InitialLeafValues.SpecificLeafAreaMin.Value
            [Maize].Arbitrator.NDemand
            [Maize].Arbitrator.DMSupply
            [Maize].Arbitrator.DMDemand
            [Maize].Arbitrator.DMAllocated
            [Maize].Arbitrator.DMSinkLimitation
            [Maize].Arbitrator.DMNutrientLimitation
            [Maize].Leaf.InitialLeafValues.GrowthDuration.Value
            [Maize].Leaf.InitialLeafValues.LagDuration.Value
            [Maize].Leaf.InitialLeafValues.SenescenceDuration.Value
            [Maize].Structure.MainStemNodeAppearanceRate.Value
            [Maize].Structure.Height
            [Maize].Stem.DMDemandFunction.PotentialDMAccumulation.Value
            [Maize].Stem.DMDemandFunction.HightLimitedDMAccumulation.Value
            [Maize].Structure.MainStemPrimordiaNo
            [Maize].Grain.NumberFunction.Value
            [ExtraVariables].Script.LeafAppearedPosition
            [ExtraVariables].Script.MostRecentlyAppearedLeafMaxSize
            [ExtraVariables].Script.LeafExpandedPosition
            [ExtraVariables].Script.MostRecentlyExpandedLeafSize
            [Maize].Leaf.DeadCohortNo
            [Phenology].ThermalTime.Value
            [Maize].Leaf.SenescingCohortNo
            [Maize].Stem.MaximumNConc.Value
            [Maize].Stem.MinimumNConc.Value
            [Maize].Stem.Live.NConc
            [Maize].Leaf.Live.NConc
            [Maize].Grain.Live.NConc
            [Maize].Husk.Live.NConc
            [Maize].Rachis.Live.NConc
            [Maize].Leaf.Dead.NConc
            [Maize].Leaf.Photosynthesis.RueAct
        Manager ClimateControl
          StartDate = 2012-10-23
          EndDate = 2013-04-10
```csharp
using System;
using Models.Core;
using APSIM.Shared.Utilities;



using System.Collections.Generic;
using System.Text;
using Models.PMF;
using Models;
using System.Xml.Serialization;

namespace Models
{
[Serializable] 
[System.Xml.Serialization.XmlInclude(typeof(Model))]
public class Script : Model
 {      
   [Link] Weather Met;  
   [Link] Clock Clock;
    
   [Description("Start Date")]
        public DateTime StartDate { get; set; }
        
   [Description("End Date")]
        public DateTime EndDate { get; set; }
 
    
   [EventSubscribe("PreparingNewWeatherData")]
   private void OnPreparingNewWeatherData(object sender, EventArgs e)
   {
   if ((Clock.Today.Date >= StartDate)  && (Clock.Today.Date <= EndDate))
	Met.Rain = 0;		
   }
 }
}
```
  Experiment Lincoln2010
    Memo
      Description of Cultivar trial
    Factors
      Factor Nitrogen: Specifications=[Fert]
        Operations Med
          2010-10-22  [Fertiliser].Apply(47, Fertiliser.Types.UreaN, 10);
          2010-12-17  [Fertiliser].Apply(200, Fertiliser.Types.UreaN, 10);
        Operations Nil
          2010-10-22  [Fertiliser].Apply(0, Fertiliser.Types.UreaN, 10);
          2010-12-17  [Fertiliser].Apply(0, Fertiliser.Types.UreaN, 10);
    Simulation Lincoln2010: Area=0; Slope=0
      Weather: FileName=%root%\Tests\Maize\lincoln.met
      Clock: StartDate=2010-10-01; EndDate=2011-04-15
      Summary summaryfile
      Memo
        TODO:

        1) Parameterise phenology of hybrid P39V43
        2) Add initial soil nitrogen to soil

        Mikes notes:
        Applied 350kg Cropzeal 15p which has 13.5% N as a base fertiliser to whole trial area. http://www.ballance.co.nz/products/key+products/cropzeal  . For Manager folder>>fertil_applic I just kept this as urea_N
        SurfaceOrganicMatter - Changed to fieldpea and changed C:N ratio to 40 (slightly educated guess) http://panhandlenotill.org/index.php/brown-revolution-part-3/

        TREATMENTS:
        Nitrogen
        NilN = 0 kg/ha
        MedN = 200 kg/ha

        VARIABLES:
        Biomass
        - AboveDM
        - StemDM
        - LeafDM
        - RachisDM --> still need simulated data
        - HuskDM --> still need simulated data
        - GrainDM
        - SenesDM --> still need simulated data

        LAI

        LeafNo
        - LeafTips
        - LeafLigules

        Phenology
        - Emerge
        - Silk
        - Tassel

        LightInt --> still need simulated data

        EAH added observed data and filters for all treatment levels, and treatment/variable info into memo
      SoilArbitrator Soil Arbitrator
      Zone Field: Area=1; Slope=0
        Soil paparoa_silt_loam: SoilType=lignin_FOM; Region=Generic soil types; State=Canterbury; Latitude=999999; Longitude=999999
          DataSource=Profile descriptions provided by Trevor Webb and data for functional horizions based on SWAMP project results
          InitialWater Initial water: PercentMethod=EvenlyDistributed; FractionFull=0.8
          Water
            Thickness  BD     AirDry  LL15   DUL    SAT
            200        1.311  0.077   0.154  0.374  0.456
            200        1.474  0.152   0.152  0.32   0.413
            200        1.601  0.162   0.162  0.325  0.376
            300        1.68   0.06    0.06   0.15   0.3
            300        1.68   0.06    0.06   0.15   0.3
            300        1.68   0.06    0.06   0.15   0.3
            SoilCrop Barley: LL=[0.154, 0.152, 0.162, 0.06, 0.06, 0.06]; KL=[0.088, 0.088, 0.07, 0.066, 0.066, 0.066]; XF=[1, 1, 1, 1, 1, 1]
            SoilCrop Canola: LL=[0.154, 0.152, 0.162, 0.06, 0.06, 0.06]; KL=[0.075, 0.075, 0.06, 0.049, 0.049, 0.049]; XF=[1, 1, 0.51, 1, 1, 1]
            SoilCrop Cloverseed: LL=[0.154, 0.152, 0.162, 0.06, 0.06, 0.06]; KL=[0.05, 0.05, 0.04, 0.016, 0.016, 0.016]; XF=[1, 1, 0.73, 1, 1, 1]
            SoilCrop Fieldpea: LL=[0.154, 0.152, 0.162, 0.06, 0.06, 0.06]; KL=[0.1, 0.1, 0.054, 0.009, 0.009, 0.009]; XF=[1, 1, 0.3, 1, 1, 1]
            SoilCrop Fababean: LL=[0.154, 0.152, 0.162, 0.06, 0.06, 0.06]; KL=[0.1, 0.1, 0.08, 0.1, 0.1, 0.1]; XF=[1, 1, 0.51, 1, 1, 1]
            SoilCrop Foragebrassica: LL=[0.154, 0.152, 0.162, 0.06, 0.06, 0.06]; KL=[0.075, 0.075, 0.06, 0.049, 0.049, 0.049]; XF=[1, 1, 0.51, 1, 1, 1]
            SoilCrop Itallian_ryegrass: LL=[0.154, 0.152, 0.162, 0.06, 0.06, 0.06]; KL=[0.075, 0.075, 0.06, 0.057, 0.057, 0.057]; XF=[1, 1, 0.51, 1, 1, 1]
            SoilCrop Lucerne: LL=[0.154, 0.152, 0.162, 0.06, 0.06, 0.06]; KL=[0.038, 0.038, 0.03, 0.019, 0.019, 0.019]; XF=[1, 1, 1, 1, 1, 1]
            SoilCrop MaizeSoil: LL=[0.154, 0.152, 0.162, 0.06, 0.06, 0.06]; KL=[0.075, 0.075, 0.06, 0.049, 0.049, 0.049]; XF=[1, 1, 0.51, 1, 1, 1]
            SoilCrop Oats: LL=[0.154, 0.152, 0.162, 0.06, 0.06, 0.06]; KL=[0.075, 0.075, 0.06, 0.049, 0.049, 0.049]; XF=[1, 1, 0.73, 1, 1, 1]
            SoilCrop Potato: LL=[0.154, 0.152, 0.162, 0.06, 0.06, 0.06]; KL=[0.1, 0.057, 0.023, 0.002, 0.002, 0.002]; XF=[1, 1, 0.3, 1, 1, 1]
            SoilCrop Grassseed: LL=[0.154, 0.152, 0.162, 0.06, 0.06, 0.06]; KL=[0.05, 0.05, 0.025, 0.003, 0.003, 0.003]; XF=[1, 1, 0.51, 1, 1, 1]
            SoilCrop Wheat: LL=[0.154, 0.152, 0.162, 0.06, 0.06, 0.06]; KL=[0.075, 0.075, 0.06, 0.049, 0.049, 0.049]; XF=[1, 1, 0.73, 1, 1, 1]
            SoilCrop ryegrass_whiteclover: LL=[0.154, 0.152, 0.162, 0.06, 0.06, 0.06]; KL=[0.05, 0.05, 0.025, 0.003, 0.003, 0.003]; XF=[1, 1, 0.51, 1, 1, 1]
            SoilCrop ryegrass: LL=[0.154, 0.152, 0.162, 0.06, 0.06, 0.06]; KL=[0.05, 0.05, 0.025, 0.003, 0.003, 0.003]; XF=[1, 1, 0.51, 1, 1, 1]
            SoilCrop whiteclover: LL=[0.154, 0.152, 0.162, 0.06, 0.06, 0.06]; KL=[0.1, 0.1, 0.054, 0.009, 0.009, 0.009]; XF=[1, 1, 0.3, 1, 1, 1]
            SoilCrop kale: LL=[0.154, 0.152, 0.162, 0.06, 0.06, 0.06]; KL=[0.06, 0.06, 0.06, 0.06, 0.06, 0.06]; XF=[1, 1, 1, 1, 1, 1]
            SoilCrop triticale: LL=[0.154, 0.152, 0.162, 0.06, 0.06, 0.06]; KL=[0.088, 0.088, 0.07, 0.05, 0.05, 0.05]; XF=[1, 1, 0.73, 1, 1, 1]
          SoilWater: residueinterception=0; SummerDate=1-Nov; SummerU=9; SummerCona=4.4; WinterDate=1-Apr; WinterU=6; WinterCona=3; DiffusConst=88; DiffusSlope=35; Salb=0.13; CN2Bare=73; CNRed=20; CNCov=0.8; max_pond=0; Thickness=[200, 200, 200, 300, 300, 300]; SWCON=[0.5, 0.56, 0.31, 0.7, 0.7, 0.7]
          SoilNitrogen: fom_type=[default, manure, mucuna, lablab, shemp, stable]; fract_carb=[0.2, 0.3, 0.54, 0.57, 0.45, 0]; fract_cell=[0.7, 0.3, 0.37, 0.37, 0.47, 0.1]; fract_lign=[0.1, 0.4, 0.09, 0.06, 0.08, 0.9]; wfpsN2N2O_x=[22, 88]; wfpsN2N2O_y=[0.1, 1]
          SoilOrganicMatter: same as Lincoln2012.Lincoln2012.RainShelter.paparoa_silt_loam.SoilOrganicMatter
          Analysis: Thickness=[200, 200, 200, 300, 300, 300]; PH=[6, 6, 6, 6, 6, 6]; PHUnits=Water; BoronUnits=HotWater
          Sample Initial nitrogen: NO3Units=kgha; NH4Units=ppm; SWUnits=Volumetric; OCUnits=Total; PHUnits=Water
            Thickness  NO3    NH4
            200        16.23  0.343249
            200        10.76  0.990502
            200        7.83   0.178014
            300        6.85   0.194444
            300        4.88   0.166667
            300        1.74   0.107143
        Irrigation
        SurfaceOrganicMatter: PoolName=fieldpea; type=fieldpea; mass=0; standing_fraction=0; cnr=40; CriticalResidueWeight=2000; OptimumDecompTemp=20; MaxCumulativeEOS=20; CNRatioDecompCoeff=0.277; CNRatioDecompThreshold=25; TotalLeachRain=25; MinRainToLeach=10; CriticalMinimumOrganicC=0.004; DefaultCPRatio=0; DefaultStandingFraction=0; StandingExtinctCoeff=0.5; FractionFaecesAdded=0.5
          Pools:
            {PoolName=fieldpea, ResidueType=fieldpea, Mass=0, CNRatio=40, StandingFraction=0}
          ResidueTypes ResidueTypesList: LoadFromResource=ResidueTypes
        Fertiliser
        Folder Manager folder
          Operations Sow
            2010-10-26  [Maize].Sow(population:12, cultivar:"Pioneer_3153", depth:50, rowSpacing:760);
          Operations Fert
            2010-10-22  [Fertiliser].Apply(47, Fertiliser.Types.UreaN, 10);
            2010-12-17  [Fertiliser].Apply(200, Fertiliser.Types.UreaN, 10);
          Operations Irrig
            2010-10-29  [Irrigation].Apply(14);
            2010-12-03  [Irrigation].Apply(10);
            2010-12-20  [Irrigation].Apply(20);
            2011-01-06  [Irrigation].Apply(30);
            2011-01-17  [Irrigation].Apply(30);
            2011-02-04  [Irrigation].Apply(30);
            2011-02-17  [Irrigation].Apply(30);
            2011-03-03  [Irrigation].Apply(30);
        Manager SimCode
```csharp
using System;
using Models.Core;
using Models.PMF;
using Models.PMF.OldPlant;
using APSIM.Shared.Utilities;

namespace Models
{
	[Serializable]
	[System.Xml.Serialization.XmlInclude(typeof(Model))]
	public class Script : Model
	{
		[Link] Clock Clock;
		[EventSubscribe("Commencing")]
		private void OnSimulationCommencing(object sender, EventArgs e)
		{
			/*
				ExpNo = 1
TreatNo = 2
			*/
		}
	}
}
```
        MicroClimate: same as Lincoln2012.Lincoln2012.RainShelter.MicroClimate
        Plant Maize: CropType=Maize
        Manager ExtraVariables: same as Lincoln2012.Lincoln2012.RainShelter.ExtraVariables
        Report: EventNames=[Clock].DoReport
          VariableNames:
            [Clock].Today
            [ExtraVariables].Script.AccumPlantN
            [ExtraVariables].Script.AccumMineralisation
            [ExtraVariables].Script.AccumDenit
            [ExtraVariables].Script.AccumFert
            [ExtraVariables].Script.AccumLeach
            [ExtraVariables].Script.AccumDetach
            [ExtraVariables].Script.DeltaSoilOMN
            [ExtraVariables].Script.DeltaSurfaceOMN
            [ExtraVariables].Script.DeltaSoilMineralN
            [ExtraVariables].Script.SWC
            [ExtraVariables].Script.DUL
            [ExtraVariables].Script.OutFlowLat
            [ExtraVariables].Script.AccumEO
            [ExtraVariables].Script.AccumEP
            [ExtraVariables].Script.AccumES
            [ExtraVariables].Script.AccumDrainage
            [ExtraVariables].Script.AccumRunoff
            [ExtraVariables].Script.AccumRainfall
            [ExtraVariables].Script.AccumIrrigation
            [ExtraVariables].Script.AccumOutflowLat
            [ExtraVariables].Script.SoilWaterDeficit
            [ExtraVariables].Script.SoilNitrogenContent
            [ExtraVariables].Script.FomN
            [ExtraVariables].Script.HumN
            [ExtraVariables].Script.BiomN
            [ExtraVariables].Script.DltNMinRes
            [ExtraVariables].Script.DltNMinTot
            [Soil].SoilWater.SW
            [Soil].SoilWater.Eo
            [Soil].SoilWater.Es
            [Soil].SoilWater.Drainage
            [Soil].SoilWater.Runoff
            [Soil].SoilWater.pond
            sum([Soil].SoilWater.SWmm) as ProfileWater
            [Soil].NO3N
            [MicroClimate].net_radn
            [MicroClimate].peta
            [MicroClimate].petr
            [Maize].Grain.Live.Wt
            [Maize].Stem.Live.Wt
            [Maize].Summariser.EarLive.Wt
            [Maize].Leaf.Live.Wt
            [Maize].Root.Live.Wt
            [Maize].Husk.Live.Wt
            [Maize].Summariser.EarLive.N
            [Maize].Grain.Live.N
            [Maize].Stem.Live.N
            [Maize].Leaf.Live.N
            [Maize].Root.Live.N
            [Maize].Root.WaterSupply
            [Maize].Root.WaterUptake
            [Maize].Leaf.Transpiration
            [Maize].Leaf.WaterDemand
            [Maize].Root.Depth
            [Maize].Leaf.CoverTotal
            [Maize].Leaf.CoverDead
            [Maize].Leaf.LAI
            [Maize].Leaf.Height
            [Maize].Leaf.InitialLeafValues.MaxArea.Value
            [Maize].Leaf.Fw
            [Maize].Leaf.Fn
            [Maize].Phenology.CurrentPhaseName
            [Maize].Phenology.Stage
            [Maize].Summariser.AboveGroundLive.N
            [Maize].Summariser.AboveGroundLive.Wt
            [Maize].Summariser.Total.N
            [Maize].Summariser.Total.Wt
            [Maize].Arbitrator.NDemand
            [Maize].Phenology.Stage
            [Maize].Leaf.ExpandedCohortNo
            [Maize].Leaf.AppearedCohortNo
            [Maize].Leaf.CohortArea[1:30]
            [ExtraVariables].Script.LeafAppearedPosition
            [ExtraVariables].Script.MostRecentlyAppearedLeafMaxSize
            [ExtraVariables].Script.LeafExpandedPosition
            [ExtraVariables].Script.MostRecentlyExpandedLeafSize
  Experiment Lincoln2008
    Factors
      Factor Sow: Specifications=[SowDate]
        Operations Late39G12
          2008-08-27  [Maize].Sow(population:10.52, cultivar:"Pioneer_3153", depth:50, rowSpacing:800);
        Operations Early39G12
          2008-09-17  [Maize].Sow(population:10.52, cultivar:"Pioneer_3153", depth:50, rowSpacing:800);
        Operations Late34K77
          2008-08-27  [Maize].Sow(population:10.52, cultivar:"Pioneer_3153", depth:50, rowSpacing:800);
        Operations Early34K77
          2008-09-17  [Maize].Sow(population:10.52, cultivar:"Pioneer_3153", depth:50, rowSpacing:800);
      Factor Cover: Specifications=[Fert]
        Operations Bare
          2008-09-16  [Fertiliser].Apply(140.5, Fertiliser.Types.UreaN, 10);
          2008-12-17  [Fertiliser].Apply(161, Fertiliser.Types.UreaN, 10);
        Operations Plastic
          2008-09-16  [Fertiliser].Apply(140.5, Fertiliser.Types.UreaN, 10);
          2008-12-17  [Fertiliser].Apply(161, Fertiliser.Types.UreaN, 10);
    Simulation Lincoln2008: Area=0; Slope=0
      Weather: FileName=%root%\Tests\Maize\lincoln.met
      Clock: StartDate=2008-06-01; EndDate=2009-06-15
      Summary summaryfile
      SoilArbitrator Soil Arbitrator
      Zone Field: Area=1; Slope=0
        Soil paparoa_silt_loam: SoilType=lignin_FOM; Region=Generic soil types; State=Canterbury; Latitude=999999; Longitude=999999
          DataSource=Profile descriptions provided by Trevor Webb and data for functional horizions based on SWAMP project results
          InitialWater Initial water: PercentMethod=EvenlyDistributed; FractionFull=0.8
          Water: same as Lincoln2010.Lincoln2010.Field.paparoa_silt_loam.Water
          SoilWater: same as Lincoln2010.Lincoln2010.Field.paparoa_silt_loam.SoilWater
          SoilNitrogen: fom_type=[default, manure, mucuna, lablab, shemp, stable]; fract_carb=[0.2, 0.3, 0.54, 0.57, 0.45, 0]; fract_cell=[0.7, 0.3, 0.37, 0.37, 0.47, 0.1]; fract_lign=[0.1, 0.4, 0.09, 0.06, 0.08, 0.9]; wfpsN2N2O_x=[22, 88]; wfpsN2N2O_y=[0.1, 1]
          SoilOrganicMatter: same as Lincoln2012.Lincoln2012.RainShelter.paparoa_silt_loam.SoilOrganicMatter
          Analysis: Thickness=[200, 200, 200, 300, 300, 300]; PH=[6, 6, 6, 6, 6, 6]; PHUnits=Water; BoronUnits=HotWater
          Sample Initial nitrogen: NO3Units=ppm; NH4Units=ppm; SWUnits=Volumetric; OCUnits=Total; PHUnits=Water
            Thickness  NO3       NH4
            200        6.18993   0.343249
            200        3.64993   0.990502
            200        2.44535   0.178014
            300        1.35913   0.194444
            300        0.968254  0.166667
            300        0.345238  0.107143
        Irrigation
        SurfaceOrganicMatter: same as Lincoln2010.Lincoln2010.Field.SurfaceOrganicMatter
        Fertiliser
        MicroClimate: same as Lincoln2012.Lincoln2012.RainShelter.MicroClimate
        Plant Maize: CropType=Maize
        Operations Fert
          2008-09-16  [Fertiliser].Apply(140.5, Fertiliser.Types.UreaN, 10);
          2008-12-17  [Fertiliser].Apply(161, Fertiliser.Types.UreaN, 10);
        Operations Irrig
          2008-10-21  [Irrigation].Apply(15);
          2008-10-29  [Irrigation].Apply(10);
          2008-11-18  [Irrigation].Apply(10);
          2008-11-27  [Irrigation].Apply(30);
          2008-12-02  [Irrigation].Apply(25);
          2008-12-09  [Irrigation].Apply(25);
          2008-12-30  [Irrigation].Apply(30);
          2009-01-06  [Irrigation].Apply(25);
          2009-01-13  [Irrigation].Apply(10);
          2009-01-26  [Irrigation].Apply(25);
          2009-01-29  [Irrigation].Apply(25);
          2009-02-04  [Irrigation].Apply(20);
          2009-02-10  [Irrigation].Apply(25);
          2009-03-18  [Irrigation].Apply(30);
        Operations SowDate
          2008-09-17  [Maize].Sow(population:10.52, cultivar:"Pioneer_3153", depth:50, rowSpacing:800);
        Report: same as Lincoln2010.Lincoln2010.Field.Report
        Manager ExtraVariables: same as Lincoln2012.Lincoln2012.RainShelter.ExtraVariables
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